U[3] := 0.772
I[3] := 0.02
I[2] := 0.01
U[2] := 0.733
I[1] := 0.005
U[1] := 0.697
Rb := (U[1] - 2*U[2] + U[3])/I[1] = 0.6
NFt := (3*U[2] - U[1] - U[3])/ln(2) = 1.05317
I0 := I[1]*exp(U[2] - 2*U[1])/NFt = 0.00245134
Id := 0, 0.001 .. 10 = [
    0; 0.001; 0.002; 0.003; 0.004; 0.005; 0.006; 0.007; 0.008; 0.009; 0.01; 0.011
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]
Ud := Id*Rb + NFt*ln((Id + I0)/I0)
# [plot: Id vs Ud]
