VAX := READPRN("C:\Users\Margo\Desktop\oe\3 лаба\Design2.dlm")
VAX = [
    0.298409, 0.0057807;
    0.287616, 0.0048104;
    0.271081, 0.00360265;
    0.245105, 0.00224678;
    0.198532, 0.000915249;
    0.0903881, 8.26119e-5;
    -0.0964142, -8.79247e-6;
    -0.176635, -3.89319e-5;
    -0.25248, -2.64986e-5;
    -0.329473, -2.72689e-5
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]
VAX[:, 0] = [
    0.298409; 0.287616; 0.271081; 0.245105; 0.198532; 0.0903881; -0.0964142; -0.176635; -0.25248; -0.329473
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]
VAX[:, 1] = [
    0.0057807; 0.0048104; 0.00360265; 0.00224678; 0.000915249; 8.26119e-5; -8.79247e-6; -3.89319e-5; -2.64986e-5; -2.72689e-5
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]
# [plot: VAX[:, 1] vs VAX[:, 0]]
Id3 := max(VAX[:, 1])
nMax := match(Id3, VAX[:, 1])
Id3 = 0.006804
nMax = [30; 31; 32; 33; 64; 65; 66; 67; 98; 99; 100; 101; 132; 133; 134; 135]
Ud3 := VAX[:, 0][50]
Ud3 = -0.991114
nId1 := match(Id3/4, VAX[:, 1])
nId2 := match(Id3/2, VAX[:, 1])
Ud1 := linterp(VAX[:, 1], VAX[:, 0], Id3/4)  # error: Эта расширенная возможность. Для использования этой и других расширенных возможностей обновите лицензию до полной с помощью кнопки "Обновить".
Ud1 =  # error: Эта переменная не определена. Проверьте правильность установки обозначения.
Id1 := Id3/4
Ud2 := linterp(VAX[:, 1], VAX[:, 0], Id3/2)  # error: Эта расширенная возможность. Для использования этой и других расширенных возможностей обновите лицензию до полной с помощью кнопки "Обновить".
Ud2 =  # error
Id2 := Id3/2
Rb := (Ud1 - 2*Ud2 + Ud3)/Id1
Rb =  # error
NFt := [(3*Ud2 - 2*Ud1) - Ud3]/ln(2)
Is0 := Id1*exp(-1/NFt*(2*Ud1 - Ud3))
NFt =  # error
Is0 =  # error
x := 10^-0
Rb := 2
IS := 1*10^-12
m := 4
Ft := 0.026
F(x) := x*Rb + ln((IS + x)/IS)*m*Ft
solve block
    # solver
    Diod_P := Minerr(IS, Rb, m, Ft)  # error: Эта расширенная возможность. Для использования этой и других расширенных возможностей обновите лицензию до полной с помощью кнопки "Обновить".
    Given
    10^-3*Rb + ln((IS + 10^-3)/IS)*m*Ft = 2.15722
    10^-2*Rb + ln((IS + 10^-2)/IS)*m*Ft = 2.41469
    10^-1*Rb + ln((IS + 10^-1)/IS)*m*Ft = 2.83416
    10^-0*Rb + ln((IS + 10^-0)/IS)*m*Ft = 4.87363
    Diod_P =  # error
    Diod_P[0] =  # error
    Diod_P[1] =  # error
    Diod_P[2] =  # error
    Diod_P[3] =  # error
    Id := 10^-3
    F(Id) := Id*Diod_P[1] + ln((Diod_P[0] + Id)/Diod_P[0])*(Diod_P[2]*Diod_P[3])
    F(Id) =  # error
end solve block
w2, □ .. □
solve block
    # guess values
    Rb := 1
    NFt := 0.0255
    Is0 := 10^-14
    Idiod := 0, 10^-5 .. 0.023
    Udiod(Idiod) := Idiod*Rb + NFt*ln((Idiod + Is0)/Is0)
    Rb1 := 1.2
    NFt1 := 0.0255
    Is01 := 22.7*10^6
    Idiod := 0, 10^-5 .. 0.023
    Uformula(Idiod) := Idiod*Rb1 + NFt1*(ln(Idiod + Is01)/Is01)
    VAX := READPRN("C:\Users\Margo\Desktop\oe\circuit1.DNO")  # error: Не удается открыть файл данных.
    Idiod := VAX[:, 1]
    Iproverka := VAX[:, 1][45]
    # [plot: Idiod vs Udiod(Idiod)]
    VAX[:, 0] =  # error
    VAX[:, 1] =  # error
    Idiod =  # error
    VAX[:, 0][45] =  # error
    VAX[:, 1][45] =  # error
    # [plot: VAX[:, 1], Uformula(Idiod) vs VAX[:, 0]]
    Uformula(Iproverka) =  # error
end solve block
