i := 0 .. 9
X := READPRN("C:\Users\Margo\Desktop\oe\2 лаба\xxx.ANO")
Fmax := X[:, 1]
Vvar := X[:, 0]
Fmax = [456201; 472703; 479087; 482754; 485221; 487021; 488404; 489521; 490454; 491238; 491688]
Vvar = [-1; -4; -7; -10; -13; -16; -19; -22; -25; -28; -30]
# [plot: Fmax[i] vs Vvar[i]]
Fr == 1/(2*pi*sqrt((Ck + Cd)*Lk))
Lk := 10^-3
Ck := 10^-10
pi := 3.14
Fr[i] := Fmax[i]
Cd[i] := 1/(4*Fr[i]^2*pi^2*Lk) - Ck
Cd = [2.18341e-11; 1.34762e-11; 1.04721e-11; 8.80018e-12; 7.69667e-12; 6.90197e-12; 6.2972e-12; 5.81274e-12; 5.41035e-12; 5.07441e-12]
Vvar = [-1; -4; -7; -10; -13; -16; -19; -22; -25; -28; -30]
# [plot: Cd[i] vs Vvar[i]]
M := 0.5
VJ0 := 0.6
CJ0 := 10^-12
U := -10, -8 .. 0
Cd = [2.18341e-11; 1.34762e-11; 1.04721e-11; 8.80018e-12; 7.69667e-12; 6.90197e-12; 6.2972e-12; 5.81274e-12; 5.41035e-12; 5.07441e-12]
Vvar = [-1; -4; -7; -10; -13; -16; -19; -22; -25; -28; -30]
solve block
    # constraints
    (1.348*10^-11) == CJ0*(1 - (-4/VJ0))^(-M)
    (6.902*10^-12) == CJ0*(1 - (-16/VJ0))^(-M)
    (5.074*10^-12) == CJ0*(1 - (-28/VJ0))^(-M)
    # solver
    minerr(CJ0, VJ0, M) = [2.709e-11; 1.80338; 0.59717]
    Given
end solve block
Cd(U) := CJ0*(1 - U/VJ0)^(-M)
# [plot: Cd(Vvar) vs Vvar]
