L := 100*10^-6
C := 10*10^-12
pi := 3.14
Fres := 1/(2*3.14*sqrt(L*C)) = 5035474
Fr := 4*10^6
Lk := 1/(4*Fr^2*pi^2*C) - L = 5.8475e-5
"Четвертый билет"
"a"
L1 := 1*10^-3
C2 := 1*10^-6
L2 := 100*10^-3
C1 := 100*10^-12
F := 1/(2*3.14*sqrt(L1*C1))
RC := 1/(2*pi*F*C2) = 0.316228
RL := 2*pi*F*L2 = 316228
"b"
F := 450*10^3
Cd := 1/(4*F^2*pi^2*L1) - C1 = 2.52148e-11
"девятый билет"
C2 := 10*10^-12
"а"
Fres := 1/(2*3.14*sqrt(L1*(C1 + C2))) = 480114
