X := READPRN("C:\Users\Margo\Desktop\oe\3 лаба\design.dlm")
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X[:, 1] := sort(X[:, 1]) = [0.000103824; 0.000867236; 0.00216721; 0.00351451; 0.00463391; 0.00471924; 0.00562156; 0.00568583; 0.00631568; 0.00635573; 0.00667895; 0.00669242]
X[:, 0] := sort(X[:, 0]) = [0.0949735; 0.209845; 0.259093; 0.285194; 0.300218; 0.301092; 0.310592; 0.311155; 0.316858; 0.317156; 0.319849; 0.319956]
Ud3 := X[:, 0][11]
Id3 := max(X[:, 1])
Id3 = 0.00669242
nMax := match(Id3, X[:, 1])
Ud3 = 0.319956
nId1 := match(Id3/4, X[:, 1])
nId2 := match(Id3/2, X[:, 1])
nId1 = [1; 2]
nId2 = [3]
nMax = [8; 9; 10; 11]
Id1 := Id3/4
Id2 := Id3/2
Ud1 := linterp(X[:, 1], X[:, 0], Id3/4)
Ud2 := linterp(X[:, 1], X[:, 0], Id3/2)
Ud1 = 0.240374
Ud2 = 0.281934
Rb := (Ud1 - 2*Ud2 + Ud3)/Id1
NFt := (3*Ud2 - 2*Ud1 - Ud3)/ln(2)
IS := Id1*exp((2*Ud1 - Ud3)*(-1/NFt)) = 0.000141311
Rb = -2.11385
NFt = 0.0650596
IS = 0.000141311
M := 0.4371
Ft := 0.1487
Given
X[:, 1] = [0.000103824; 0.000867236; 0.00216721; 0.00351451; 0.00463391; 0.00471924; 0.00562156; 0.00568583; 0.00631568; 0.00635573; 0.00667895; 0.00669242]
X[:, 0] = [0.0949735; 0.209845; 0.259093; 0.285194; 0.300218; 0.301092; 0.310592; 0.311155; 0.316858; 0.317156; 0.319849; 0.319956]
[[[0.095]]] == [[1.038*10^-4]]*Rb + ln((IS + [[1.038*10^-4]])/IS)*M*Ft
[[0.3]] == [[4.634*10^-3]]*Rb + ln((IS + [[4.634*10^-3]])/IS)*M*Ft
[[0.317]] == [[6.316*10^-3]]*Rb + ln((IS + [[6.316*10^-3]])/IS)*M*Ft
[[0.32]] == [[6.692*10^-3]]*Rb + ln((IS + [[6.692*10^-3]])/IS)*M*Ft
с
Diod := Minerr(IS, Rb, M, Ft)
Idiod := X[:, 1]
Diod = [0.000141311; -2.11385; 0.4371; 0.1487]
Rb1 := Diod[1] = -2.11385
NFt1 := Diod[3]*Diod[2] = 0.0649968
Is01 := Diod[0] = 0.000141311
Uformula(Idiod) := Idiod*Rb1 + NFt1*ln((Idiod + Is01)/Is01)
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